OpenVSP model (file version 5), 6 components.
Geometry view with OpenVSP parameter names; values to 6 digits, angles in degrees, lengths in the model's unit.
Overall bounding box: X_Min=94.9971 X_Len=490.674 Y_Min=-220.584 Y_Len=441.169 Z_Min=60.0524 Z_Len=107.894

Fuselage "Fuselage"
  location (X Y Z) 100 0 100, rotation 0 0 0
  bounding box size 480.607 58.5701 66.86
  Design: Length=480
  cross sections:
    n  XLocPercent  YLocPercent  ZLocPercent  shape
    0  0            0            -0.0326087   point
    1  0.159822     0            -0.0190124   general fuselage BotStr=0.83 BotTanAngle=90 CornerRad=0 Height=60 LowStr=0.83 MaxWidthLoc=0 TopStr=0.83 TopTanAngle=90 UpStr=0.83 Width=55
    2  0.26         0            -0.014018    general fuselage BotStr=0.83 BotTanAngle=90 CornerRad=0 Height=65.0673 LowStr=0.83 MaxWidthLoc=0 TopStr=0.83 TopTanAngle=90 UpStr=0.83 Width=58
    3  0.360821     0            -0.00781042  general fuselage BotStr=0.83 BotTanAngle=90 CornerRad=0 Height=57.6 LowStr=0.83 MaxWidthLoc=0 TopStr=0.83 TopTanAngle=90 UpStr=0.83 Width=50
    4  0.42         0            0.001        general fuselage BotStr=0.83 BotTanAngle=90 CornerRad=0 Height=40.8 LowStr=0.83 MaxWidthLoc=0.0306122 TopStr=0.83 TopTanAngle=90 UpStr=0.83 Width=33
    5  0.48         0            0.01         general fuselage BotStr=0 BotTanAngle=90 CornerRad=0.12727 Height=26.4 LowStr=0 MaxWidthLoc=0.41818 TopStr=0.83 TopTanAngle=90 UpStr=0.83 Width=16
    6  0.896759     0            0.01         as above
    7  0.96875      0            0.021        general fuselage BotStr=1.17595 BotTanAngle=90 CornerRad=0.41504 Height=12 LowStr=0.91267 MaxWidthLoc=0.41818 TopStr=0.83 TopTanAngle=90 UpStr=0.83 Width=8.62188
    8  1            0            0.027        point
  SS_Ellipse "SS_ELLIP_0": Center_U=0.0597826 Center_W=0.75 U_Length=0.075 W_Length=0.5
  SS_Rectangle "SS_RECT_1": Center_U=0.266304 Center_W=0.5 Theta=-5 U_Length=0.07 W_Length=0.25
  SS_Rectangle "SS_RECT_2": Center_U=0.687 Center_W=0.25 U_Length=0.105 W_Length=0.2

Wing "Wing", child of "Fuselage"
  location (X Y Z) 178.114 0 120.541, rotation 0 0 0; relative location 10 0 1.5, rotation 0 0 0
  symmetric about XZ
  bounding box size 75.4362 419.153 25.6928
  totals: TotalSpan=420.822 TotalProjectedSpan=418.744 TotalChord=40.9231 TotalArea=16413.3 TotalAR=10.6832
  root: chord 45.2308, twist 0, NACA 4-series Camber=0.02 CamberLoc=0.4 ThickChord=0.157
  sections:
    n  Span     Root_Chord  Tip_Chord  Area     Sweep     Sweep_Location  Dihedral  Twist  Twist_Location  tip airfoil
    1  20.8108  45.2308     45.2308    941.289  0         0               0         0      0               as above
    2  81.6     45.2308     38.7692    3427.2   -8.89635  0               6         0      0               as above
    3  108      38.7692     32.3077    3838.15  -9.16678  0               6         0      0               as above
  SS_Control "SS_CONT_0": UStart=0.425 UEnd=0.575 Length_C_Start=0.35 Length_C_End=0.35 Length_Start=15.5481 Length_End=13.8519 LE_Flag=0 Surf_Type=2
  SS_Control "SS_CONT_1": UStart=0.621951 UEnd=0.780488 Length_C_Start=0.35 Length_C_End=0.35 Length_Start=13.321 Length_End=11.5283 LE_Flag=0 Surf_Type=2

Fuselage "InnerLiftNacelles", child of "Wing"
  location (X Y Z) 136.425 101.964 119.288, rotation 8 2 0; relative location -28.916 0 -9.78261, rotation 8 2 0
  symmetric about XZ
  bounding box size 192.391 223.893 27.8726
  Design: Length=192
  cross sections:
    n  XLocPercent  YLocPercent  ZLocPercent  shape
    0  0            0            0            point
    1  0.220109     0            0            general fuselage BotStr=0 BotTanAngle=90 CornerRad=0 Height=27 LowStr=0 MaxWidthLoc=0.3 TopStr=0.83 TopTanAngle=90 UpStr=0.83 Width=20
    2  0.5          0            0.01         general fuselage BotStr=0 BotTanAngle=90 CornerRad=0.127 Height=25.2 LowStr=0 MaxWidthLoc=0.35 TopStr=0.83 TopTanAngle=90 UpStr=0.83 Width=20
    3  0.828804     0            0.035        general fuselage BotStr=0 BotTanAngle=90 CornerRad=0.127 Height=18 LowStr=0 MaxWidthLoc=0.4 TopStr=0.83 TopTanAngle=90 UpStr=0.83 Width=18
    4  1            0            0.055        ellipse Ellipse_Height=8 Ellipse_Width=0
  SS_Rectangle "Sideslip blown flaps": Center_U=0.538043 Center_W=0.255435 U_Length=0.25 W_Length=0.233696

Fuselage "OuterLiftNacelles", child of "Wing"
  location (X Y Z) 94.9971 209.372 130.577, rotation 8 2 0; relative location -52.916 0 -9.78261, rotation 8 2 0
  symmetric about XZ
  bounding box size 216.423 441.169 27.5212
  Design: Length=216
  cross sections:
    n  XLocPercent  YLocPercent  ZLocPercent  shape
    0  0            0            0            point
    1  0.110054     0            0            circle Circle_Diameter=20
    2  0.220109     0            0            general fuselage BotStr=0 BotTanAngle=90 CornerRad=0 Height=27 LowStr=0 MaxWidthLoc=0.3 TopStr=0.83 TopTanAngle=90 UpStr=0.83 Width=20
    3  0.5          0            0.01         general fuselage BotStr=0 BotTanAngle=90 CornerRad=0.127 Height=25.2 LowStr=0 MaxWidthLoc=0.35 TopStr=0.83 TopTanAngle=90 UpStr=0.83 Width=20
    4  0.828804     0            0.035        general fuselage BotStr=0 BotTanAngle=90 CornerRad=0.127 Height=18 LowStr=0 MaxWidthLoc=0.4 TopStr=0.83 TopTanAngle=90 UpStr=0.83 Width=18
    5  1            0            0.055        ellipse Ellipse_Height=8 Ellipse_Width=0
  SS_Rectangle "Sideslip blown flaps": Center_U=0.538043 Center_W=0.255435 U_Length=0.25 W_Length=0.233696

Wing "VerticalTail", child of "Fuselage"
  location (X Y Z) 531.896 0 112.991, rotation 90 0 0; relative location 0 0 -5, rotation 90 0 0
  bounding box size 53.7743 7.20312 51
  totals: TotalSpan=51 TotalProjectedSpan=51 TotalChord=45 TotalArea=2295 TotalAR=1.13333
  root: chord 48, twist 0, NACA 4-series Camber=0 CamberLoc=0.2 ThickChord=0.15
  sections:
    n  Span  Root_Chord  Tip_Chord  Area  Sweep  Sweep_Location  Dihedral  Twist  Twist_Location  tip airfoil
    1  51    48          42         2295  13     0               0         0      0.25            NACA 4-series Camber=0 CamberLoc=0.2 ThickChord=0.1
  SS_Control "SS_CONT_0": UStart=0.359756 UEnd=0.640244 Length_C_Start=0.333 Length_C_End=0.333 Length_Start=15.8256 Length_End=14.1444 LE_Flag=0 Surf_Type=2

Wing "Tail", child of "VerticalTail"
  location (X Y Z) 543.671 0 163.991, rotation 0 0 0; relative location 0 0 0, rotation 0 0 0
  symmetric about XZ
  bounding box size 42.0055 195.522 6.35104
  totals: TotalSpan=192 TotalProjectedSpan=192 TotalChord=33 TotalArea=6336 TotalAR=5.81818
  root: chord 42, twist 0, NACA 4-series Camber=0.02 CamberLoc=0.4 ThickChord=0.15
  sections:
    n  Span  Root_Chord  Tip_Chord  Area  Sweep    Sweep_Location  Dihedral  Twist  Twist_Location  tip airfoil
    1  96    42          24         3168  10.6197  0               0         0      0.25            as above

User parameters
  VTOL:DiskArea = 3.33333  (Disk Area)
  VTOL:DiskLoading = 50  (Disk Loading)
  VTOL:GrossWeight = 5000  (Gross Weight)
  VTOL:Naft = 20  (Number of disks in aft array)
  VTOL:Nfwd = 10  (Number of disks in forward array)
  VTOL:Spac = 0  (Spac)
